#!/usr/bin/env python3
# -*- coding: utf-8 -*-
"""
Created on Mon May 19 09:29:11 2025

@author: benjamin
"""

import os
import Sofa
import SofaRuntime
import numpy as np
from scipy.spatial.transform import Rotation as R
#from stlib.physics.deformable import ElasticMaterialObject
#from stlib.physics.constraints import FixedBox
#from stlib.physics.collision import CollisionMesh
from stlib3.scene import Scene
from splib3.animation import animate
import Geometries.Constants as Const
import rigidification

dirPath = os.path.dirname(os.path.abspath(__file__)) + '/'
path = os.path.dirname(os.path.abspath(__file__))+'/Meshes/'
MeshesPath = os.path.dirname(os.path.abspath(__file__))+'/Geometries/'
GeneratedMeshesPath = os.path.dirname(os.path.abspath(__file__))+'/Geometries/'
TempPath = os.path.dirname(os.path.abspath(__file__))+'/Temp/'


def calculate_B_field(distance_r_mm, magnetic_moment_direction, mu_magnitude):
    """
    Calculates the magnetic field B generated by a magnetic dipole at a given point.

    Parameters:
    - distance_r_mm: Vector (in mm) from the dipole to the point where the field is measured.
    - magnetic_moment_direction: Unit vector indicating the direction of the magnetic moment.
    - mu_magnitude: Magnitude of the magnetic moment (e.g., in A·m²).

    Returns:
    - B_field_pT: Magnetic field vector at the point, in picoTesla (pT).
    """

    # Convert the distance vector to an array and compute its norm
    r = np.array(distance_r_mm)
    r_magnitude = np.linalg.norm(r)

    # Unit vector in the direction of r
    r_hat = r / r_magnitude
    Mu_hat = magnetic_moment_direction
    # Full magnetic moment vector (direction * magnitude)
    mu = [x * mu_magnitude for x in Mu_hat]

    # Compute the dipole field tensor: 3*r̂*r̂ᵀ - I
    tensor = 3 * np.outer(r_hat, r_hat) - np.identity(3)

    # Apply the formula: B = (μ₀ / 4π) * (tensor ⋅ μ) / |r|³
    numerator = np.matmul(tensor, mu)
    denominator = 4 * np.pi * (abs(r_magnitude)**3)

    # Magnetic field B in Tesla
    B_field = numerator / denominator

    # Convert Tesla to microTesla
    B_field_pT = B_field *  1000000000000000

    return B_field_pT


class Controller(Sofa.Core.Controller):

    def __init__(self, *args, **kwargs):
        Sofa.Core.Controller.__init__(self, *args, **kwargs)
        print(" Python::__init__::" + str(self.name.value))

        self.RootNode = kwargs['RootNode']
        self.RigidMO = kwargs['RigidMO']
        # self.SensorMO = kwargs['SensorMO']
        self.CFF = kwargs['CFF']
        self.CFFSphereROI = kwargs['CFFSphereROI']
        # self.ContactNodeMO = kwargs["ContactNodeMO"]
        # self.articulationRigid = kwargs["articulationRigid"]
        self.visuMO= kwargs["visuMO"]

        self.t = 0
        print('Finished Init')

        # self.ModelNode = self.RootNode.solverNode.deformableNode.model

    def MoveCFFSphereROI(self):
        x = Const.MagneticSkinLength/2 * np.sin(self.t * 0.05)
        y = -5
        z = Const.MagneticSkinHeight
        self.CFFSphereROI.centers = [[x, y, z]]
        self.t += 1

    # def obtener_rotacion_sensor(sensor_quat):
    # from scipy.spatial.transform import Rotation as R
    # sensor_rot = R.from_quat(sensor_quat)
    # return sensor_rot.as_matrix()

    # def mapCapCoordinatesTo3DCoords(self):
    #     WeightList = np.loadtxt("Touch/WeightList.txt")
    #     # WeightList = np.loadtxt("../DataSimulacion/CWeightList.txt")
    #     print(f"WeightList: {WeightList}")
    #     IdxList = np.loadtxt("Touch/IdxList.txt", dtype ='int')
    #     # IdxList = np.loadtxt("../DataSimulacion/IdxList.txt", dtype ='int')

    #     print(f"IdxList: {IdxList}")
    #     Vsum = np.sum(WeightList)
    #     Sum = np.array([0,0,0])
    #     for (i,Idx) in enumerate(IdxList):
    #         LinearIdx = Idx[0]* 10  + Idx[1]
    #         print(f"LinearIdx: {LinearIdx}")
    #         Wi = WeightList[i]/Vsum
    #         Coords3D =  np.array(ContactNodeMO.rest_position.value[LinearIdx]* Wi)
    #         Sum = Sum + Coords3D
    #     self.CFFSphereROI.centers = [Sum]
    #     self.SphereROIVisu.centers = [Sum]
    #     self.SphereCompleteMesh.centers = [Sum]
    #     self.SphereCompleteMeshSTL.centers = [Sum]


    def onAnimateBeginEvent(self, eventType):


       # ----Load saved positions----
        try:
            magnet_pose = np.loadtxt("MagnetPose_Direct.txt")
            sensor_pose = np.loadtxt("SensorPose_Direct.txt")
        except:
            print("Error reading pose files")
            return

        print('------------------------------------------------')
        # ---- Extract pose of magnets and sensors ----
        MagnetPose = self.RigidMO.position.value[1:Const.NMagnets+1, :]
        SensorPose = self.RigidMO.position.value[Const.NSensors+1:, :]


         # ---- Extract 3D positions of magnets and sensors ----
        MagnetPosition = MagnetPose[:, :3]


        SensorPosition = SensorPose[:,:3]
        GlobalMagneticField = []

        for j in range(Const.NMagnets):

            LocalMagneticField = []
            # print(f'Distancia sensor {j} - imanes:', Dist_Sensor)
            quat_sensor = SensorPose[j, 3:7]
            MiR_Sensor = R.from_quat(quat_sensor)

            R_sensor_inv = R.from_quat(quat_sensor).inv()
            rotation_matrix_sensor_inv = R_sensor_inv.as_matrix()
            # rotation_Matrix_Sensor = MiR_Sensor.as_matrix()
            # print(f"i : {j}, quat_iman{quat_sensor} ")
            # print(f' sensor : {j}')
            # print('--------------------------------------')
            for i in range(Const.NMagnets):
                Dist_Sensor_global = SensorPosition[j] - MagnetPosition[i]
        #         # pos_iman = Lista_imanes[i]

                delta_local = rotation_matrix_sensor_inv @ Dist_Sensor_global

        #         # print(f'Distancia sensor {j} a {i} - imanes:', delta_local)
                quat_Magnet = MagnetPose[i, 3:7]

                # print(f"i : {i}, quat_iman{quat_Magnet} ")
                MiR_Magnet = R.from_quat(quat_Magnet)  # (x, y, z, w)

                rotation_Matrix_Magnet = MiR_Magnet.as_matrix()

                rotation_Matrix = MiR_Sensor.inv().as_matrix() @ rotation_Matrix_Magnet

                Direccion_momento_magnetico = rotation_Matrix[:, 2]

                # print(f"Direccion momento magnetico iman {i+1} ", Direccion_momento_magnetico)

                LocalMagneticField.append(calculate_B_field(delta_local, Direccion_momento_magnetico, Const.mu_magnitude))
            # print("LocalMagneticField: ", LocalMagneticField)
            TotalMagneticField = np.sum(LocalMagneticField, axis=0)
            GlobalMagneticField.append(TotalMagneticField)
            print(f"GlobalMagneticField {j}", TotalMagneticField )
        np.savetxt("campo_global.txt", GlobalMagneticField)


        # PointsSphereRoi = self.CFFSphereROI.pointsInROI.value


        # CovM = np.cov(np.transpose(PointsSphereRoi))
        # # print(CovM)
        # EigVals, EigVecs = np.linalg.eig(CovM)
        # minIdx = np.argmin(EigVals)
        # directions = EigVecs[:,minIdx]

        # print(f"PointsSphereRoi", PointsSphereRoi)


        # magnitude = -2e6
        # force_vector = magnitude * directions / np.linalg.norm(directions)
        # self.CFF.totalForce.value = force_vector.tolist()
        # print(self.CFF.totalForce.value )

def createScene(rootNode):

    SofaRuntime.importPlugin("ArticulatedSystemPlugin")

    pluginsList = [
        'ArticulatedSystemPlugin',
        'SoftRobots',
        'SoftRobots.Inverse',
        'Sofa.Component.AnimationLoop',
        'Sofa.Component.Constraint.Lagrangian.Correction',
        'Sofa.Component.Constraint.Lagrangian.Solver',
        'Sofa.Component.Constraint.Projective',
        'Sofa.Component.IO.Mesh',
        'Sofa.Component.LinearSolver.Direct',
        'Sofa.Component.Mapping.NonLinear',
        'Sofa.Component.Mass',
        'Sofa.Component.SolidMechanics.Spring',
        'Sofa.Component.StateContainer',
        'Sofa.Component.Topology.Container.Constant',
        'Sofa.Component.Visual',
        'Sofa.GL.Component.Rendering3D',
        'Sofa.GUI.Component',

    ]
    rootNode.addObject('RequiredPlugin', name='Sofa.Component.Engine.Select')
    rootNode.addObject('RequiredPlugin', name='Sofa.Component.LinearSolver.Iterative')
    rootNode.addObject('RequiredPlugin', name='Sofa.Component.Mapping.Linear')
    rootNode.addObject('RequiredPlugin', name='Sofa.Component.MechanicalLoad')
    rootNode.addObject('RequiredPlugin', name='Sofa.Component.Setting')
    rootNode.addObject('RequiredPlugin', name='Sofa.Component.SolidMechanics.FEM.Elastic')
    rootNode.addObject('RequiredPlugin', name='Sofa.Component.Topology.Container.Dynamic')


    scene = Scene(rootNode, plugins=pluginsList, iterative=False)
    scene.addMainHeader()
    scene.addObject('DefaultVisualManagerLoop')
    scene.addObject('FreeMotionAnimationLoop')
    scene.addObject('GenericConstraintSolver', maxIterations=1e3, tolerance=1e-5)
    scene.Simulation.addObject('GenericConstraintCorrection')
    scene.addObject('BackgroundSetting', color='0.8 0.8 0.8')
    scene.dt = 0.02
    scene.gravity = [0,  0, -9810]
    # scene.addObject('VisualStyle', displayFlags='hideWireframe showBehaviorModels hideCollisionModels hideBoundingCollisionModels showForceFields showInteractionForceFields')


    # ---- Paths to mesh files ----
    VolumetricMeshPath = GeneratedMeshesPath + 'MagneticSkin.vtk'

    SurfaceMeshPath = GeneratedMeshesPath + 'MagneticSkin.stl'

    #----------------------
    # Goal Node
    #----------------------

    #----------------------
    # Rigidification - start
    #----------------------


    completeMesh = scene.addChild('completeMesh')
    completeMesh.addObject('MeshVTKLoader', name='loader', filename=VolumetricMeshPath)
    completeMesh.addObject('TetrahedronSetTopologyContainer', src='@loader', name='container')
    completeMesh.init()

    Boxes = []
    for i in range(len(Const.rigidObjectsBoxCoordsThumb)):
        boxTip = completeMesh.addObject('BoxROI', name='Tip'+str(i), box=[Const.rigidObjectsBoxCoordsThumb[i]], drawBoxes=True,
                                        tetrahedra="@container.tetrahedra" , position="@container.position")
        Boxes.append(boxTip)
        boxTip.init()

    MeshTetra = completeMesh.addObject('MeshTopology', name="AllMesh", src='@loader')
    positionAllPoints = MeshTetra.findData('position').value;
    nbPoints = len(positionAllPoints)

    IndicesWithRigidIdx = np.empty((0,2), dtype=int)

    for (i,Box) in enumerate(Boxes):
        IndicesNP = np.array(Box.indices.value, dtype=int)
        NPoints = len(IndicesNP)
        RigidIdx = np.ones(NPoints,dtype=int)*i
        CurrentIndicesWithRigidIdx = np.append(IndicesNP.reshape((NPoints,1)), RigidIdx.reshape((NPoints,1)),1)
        IndicesWithRigidIdx = np.append(IndicesWithRigidIdx, CurrentIndicesWithRigidIdx,0)


    IndicesWithRigidIdxSorted = np.sort(IndicesWithRigidIdx[:,0],0)
    SortedIdxs = np.argsort(IndicesWithRigidIdx[:,0],0)
    SortedRigidIdxs = IndicesWithRigidIdx[:,1][SortedIdxs]

    indicesTip = IndicesWithRigidIdxSorted.tolist()
    rigidBlocks = [IndicesWithRigidIdxSorted.tolist()]


    DeformableIndicesTotal = []

    for i in range(nbPoints):
        if i not in indicesTip:
            DeformableIndicesTotal.append(i)

    freeBlocks = np.sort(DeformableIndicesTotal)
    IdxsOrderedFreeBlocks = np.argsort(DeformableIndicesTotal)
    indexPairs = np.array(rigidification.fillIndexPairs(nbPoints,freeBlocks,rigidBlocks))
    NPPointsDeformable = positionAllPoints[DeformableIndicesTotal,:]
    NPSortedPointsDeformable = NPPointsDeformable[IdxsOrderedFreeBlocks, :]
    PointsDeformable = NPSortedPointsDeformable.flatten().tolist()
    pointsBody = PointsDeformable
    #deformablePoints = pointsBody

    pointsTip = np.array(positionAllPoints[indicesTip,:]).flatten().tolist()
    rigidIndexPerPoint = SortedRigidIdxs.tolist()


    # ----------------------------------------
    #            Articulation
    # ----------------------------------------


    # ---- Fixed servoBody ----
    servoBody = scene.Simulation.addChild('ServoBody')
    servoBody.addObject('MechanicalObject', name='dofs', template='Rigid3',
                        position=[[0., 0., Const.ArticulationAxis, 0., 0., 0., 1.]])
    servoBody.addObject('FixedProjectiveConstraint', indices=0)
    servoBody.addObject('UniformMass', totalMass=0.01)

    visualServoBody = servoBody.addChild('visualServoBody')
    visualServoBody.addObject('MeshSTLLoader', name='loader', filename=GeneratedMeshesPath + 'thumb_dip.stl')
    visualServoBody.addObject('MeshTopology', src='@loader')
    visualServoBody.addObject('OglModel', color=[0.15, 0.45, 0.75, 1], translation=[46.5, 0, 0], rotation=[0, 0, 0] )
    visualServoBody.addObject('RigidMapping', index=0)


    # ---- Articulation angle: 1 DOF rotation  ----
    articulationAngle = scene.Simulation.addChild('Articulation')
    articulationAngle.addObject('MechanicalObject', name='dofs', template='Vec1', position=[[0]],
                                rest_position=[[Const.ArticulationAngleRad]])
    articulationAngle.addObject('RestShapeSpringsForceField', points=0, stiffness=1e12)
    articulationAngle.addObject('UniformMass', totalMass=0.01)


    # ---- ServoWheel ----
    servoWheel = articulationAngle.addChild('ServoWheel')
    servoWheel.addObject('MechanicalObject', name='dofs', template='Rigid3',
                         position=[[0., 0., Const.ArticulationAxis, 0., 0., 0., 1.],
                                   [0., 0., Const.ArticulationAxis, 0., 0., 0., 1.]],
                         showObject = True, showObjectScale=4)


    # ---- Mapping articulation control to servo and body -----
    servoWheel.addObject('ArticulatedSystemMapping', input1='@../dofs', input2='@../../ServoBody/dofs', output='@./')


    RigidNode= servoWheel.addChild('RigidNode')


    nominal_pose = []
    TipOrientation = [0, 0, 0, 1]


    for center in Const.rigidObjects:
        CurrentPose = center + TipOrientation
        nominal_pose += CurrentPose
    RigidMO = RigidNode.addObject("MechanicalObject",template="Rigid3d",name="RigidMesh", position=nominal_pose,
                                  showObject=True, showObjectScale=2, showIndices=False, showIndicesScale=0.05) # orientation is 240 deg away from scene origin
    # print(nominal_pose)

    # RigidNode.addObject("RigidMapping", input="@../dofs", output="@RigidMesh", index = 0)


    visualservoWheel = servoWheel.addChild('visualservoWheel')
    visuMO = visualservoWheel.addObject('MechanicalObject', name='visuMO',template='Rigid3', position=[[0.0, 0, -0, 0,0,0,1]], showObject = True, showObjectScale=15)
    # visual1.addObject('RigidMapping', index=1)

    # visualservoWheel.addObject('RestShapeSpringsForceField', points=0, stiffness=1)

    # visualservoWheel.addObject('UniformMass', totalMass=0.01)
    # visualservoWheel.addObject("FixedConstraint", indices=0)
    servoWheel.addObject('FixedProjectiveConstraint', indices=[0])
    visualservoWheel.addObject('MeshSTLLoader', name='loader', filename= GeneratedMeshesPath + 'thumb_fingertip.stl')
    visualservoWheel.addObject('MeshTopology', src='@loader')
    visualservoWheel.addObject('OglModel', color=[0.4, 0.45, 0.5, 1.0], translation=[-0, 0, -0])
    visualservoWheel.addObject('RigidMapping', index=1)
    # visualservoWheel.addObject('RigidMapping', input='@visuMO', output='@.')
    # visual1.addObject('RigidMapping', input='@objSTL', output='@./')
    # visualservoWheel.addObject("BarycentricMapping")

    nominal_pose1 = []

    for center in Const.rigidObjects[1:]:
        CurrentPose = center + TipOrientation
        nominal_pose1 += CurrentPose

    freeCenter = scene.Simulation.addChild("freeCenter")
    freeCenter.addObject("MechanicalObject", name="dofs", template="Rigid3",
                          position=nominal_pose1,
                          showObject=False, showObjectScale=0)
    # freeCenter.addObject("UniformMass", totalMass=0.01)
    freeCenter.addObject("EulerImplicitSolver")
    freeCenter.addObject("SparseLDLSolver")
    freeCenter.addChild(RigidNode)


    # #Add the sensors
    # nominalPoseSensors = []
    # TipOrientation = [0, 0, 0, 1]
    # for center in Const.SensorCenters:
    #     CurrentPose = center + TipOrientation
    #     nominalPoseSensors += CurrentPose

    # sensorCenter = servoWheel.addChild("sensorCenter")
    # SensorMO = sensorCenter.addObject("MechanicalObject", name="dofs", template="Rigid3",
    #                      position=nominalPoseSensors ,
    #                      showObject=True, showObjectScale=2)
    # sensorCenter.addObject("UniformMass", totalMass=0.01)
    # sensorCenter.addObject("EulerImplicitSolver")
    # sensorCenter.addObject("SparseLDLSolver")
    # sensorCenter.addObject("RigidMapping", input="@Simulation/Articulation/ServoWheel/dofs", rigidIndexPerPoint=Const.indexPerPointSensor)


    RigidifiedNode =  RigidNode.addChild('RigidifiedNode')
    RigidifiedNode.addObject('MechanicalObject', name='RigidifiedMesh', position=pointsTip,
                             template='Vec3d', showObject=True, showObjectScale=4, showColor=1)
    RigidifiedNode.addObject("RigidMapping", globalToLocalCoords="true", rigidIndexPerPoint=rigidIndexPerPoint)


    # ---- SubsetMultiMapping to connect ServoWheel and freeCenter to rigid tips ----
    # RigidNode.addObject('SubsetMultiMapping',
    #                       name="mapping",
    #                       input=['@../dofs', '@/Simulation/freeCenter/dofs'],
    #                       output='@./', indexPairs= [Const.IndexPairs])


    # RigidNode.addObject('SubsetMultiMapping',
    #                       name="mapping",
    #                       input=['@Simulation/Articulation/ServoWheel/dofs',
    #                              '@Simulation/freeCenter/dofs',
    #                              '@Simulation/Articulation/ServoWheel/sensorCenter/dofs'],
    #                       output='@./', indexPairs= [Const.IndexPairs])


    # RigidNode.addObject('SubsetMultiMapping',
    #         name="mapping",
    #         input=[
    #             '@Simulation/ServoBody/dofs',     # reemplazo de ServoWheel
    #             '@Simulation/freeCenter/dofs'
    #         ],
    #         output='@./',
    #         indexPairs=[0, 1, 1, 0, 1, 1, 1, 2, 1, 3]
        # )
        #    ---- SubsetMultiMapping to connect ServoWheel and freeCenter to rigid tips ----
    # RigidNode.addObject('SubsetMultiMapping',
    #                       name="mapping",
    #                       input=['@/Simulation/Articulation/ServoWheel/dofs',
    #                              '@/Simulation/freeCenter/dofs'],
    #                       output='@./', indexPairs= [0, 1, 1, 0, 1, 1, 1, 2, 1, 3])

    RigidNode.addObject('SubsetMultiMapping',
                          name="mapping",
                          input=['@Simulation/Articulation/ServoWheel/dofs', '@Simulation/freeCenter/dofs'],
                          output='@./', indexPairs= [0, 1, 1, 0, 1, 1, 1, 2, 1, 3])


    # --- Define Articulation center ----
    articulationCenter = articulationAngle.addChild('ArticulationCenter')
    articulationCenter.addObject('ArticulationCenter', parentIndex=0, childIndex=1, posOnParent=[0., 0., -0], posOnChild=[0., 0., 0.])
    articulation = articulationCenter.addChild('Articulations')
    articulation.addObject('Articulation', translation=False, rotation=True, rotationAxis=[0, 1, 0], articulationIndex=0)
    articulationAngle.addObject('ArticulatedHierarchyContainer')


    # ---- Deformable Node -----
    deformableNode = RigidifiedNode.addChild("deformableNode")
    deformableNode.addObject('PointSetTopologyContainer', position=pointsBody)
    deformableNode.addObject('MechanicalObject', name='DeformableMech', showObject = False, showObjectScale = 4)


    model = deformableNode.addChild('model')
    RigidifiedNode.addChild(model)


    	#---- Heart ----
    model.addObject('EulerImplicitSolver', name='nodesolver')
    model.addObject('ShewchukPCGLinearSolver', iterations='15', name='linearsolver', tolerance='1e-5', update_step='1')
    model.addObject('MeshVTKLoader', name='loader', filename=VolumetricMeshPath)
    model.addObject('TetrahedronSetTopologyContainer', src='@loader', name='container')
    model.addObject('MechanicalObject', name='tetras', template='Vec3', showIndices=False, showIndicesScale='4e-5', rx='0', dz='0')
    model.addObject('UniformMass', totalMass='0.09')
    model.addObject('TetrahedronFEMForceField', template='Vec3', name='FEM', method='large', poissonRatio=Const.PoissonRatio,  youngModulus=Const.YoungsModulus)
    model.addObject('BoxROI', name='BaseROI', box=Const.BoxROIFixCoords, drawBoxes=True, position="@tetras.rest_position", tetrahedra="@container.tetrahedra")
    model.addObject('RestShapeSpringsForceField', points='@BaseROI.indices', stiffness='1e12')
    model.addObject("SubsetMultiMapping",name="subsetMapping",template="Vec3d,Vec3d", input='@'+deformableNode.getPathName()+'/DeformableMech' + ' ' + '@'+RigidifiedNode.getPathName()+'/RigidifiedMesh' , output='@./tetras', indexPairs=indexPairs.tolist())


    # ----------------------------------------
    # Visualization
    # ----------------------------------------


    modelVisu = model.addChild('visu')
    modelVisu.addObject('MeshSTLLoader', filename=SurfaceMeshPath, name="loader")
    modelVisu.addObject('OglModel', src="@loader", scale3d=[1, 1, 1])
    modelVisu.addObject('BarycentricMapping')


    	#---- Sphere ROI ----
    CFFNode = model.addChild('CFFNode')
    CFFNode.addObject('MeshSTLLoader', filename=SurfaceMeshPath, name="loader")
    CFFMO = CFFNode.addObject('MechanicalObject', position='@loader.position')
    CFFSphereROI = CFFNode.addObject('SphereROI', template="Vec3d", name='CFFSphereROI', centers=Const.indenterPosition, radii=[Const.indenterRadius], drawSphere=True)
    CFFSphereROI.init()
    CFF = CFFNode.addObject('ConstantForceField', name='CFF', template='Vec3', indices='@CFFSphereROI.indices', totalForce=[0, 0, 0], )
    CFFNode.addObject("BarycentricMapping")


    rootNode.addObject(Controller(name="ActuationController",
                                  RootNode=rootNode,
                                  RigidMO=RigidMO,
                                  visuMO = visuMO,
                                #   SensorMO= SensorMO,
                                #   ContactNodeMO = ContactNodeMO,
                                  CFF=CFF,
                                  CFFSphereROI=CFFSphereROI))


    def animation(target, factor):
        angle_start = Const.ArticulationAngleDeg
        angle_end = -Const.ArticulationAngleDeg

        angle_start = np.deg2rad(angle_start)
        angle_end = np.deg2rad(angle_end)

        angle = angle_start + (angle_end - angle_start) * 0.5 * (1 - np.sin(2 * np.pi * factor))

        target.dofs.rest_position[0][0] = angle

    #Aimation function

    if Const.runAnimateArticulation == True:
        animate(animation, {'target': articulationAngle}, duration=2, mode='loop')


    #cosas que revisar para que funcione, la caja  base roi dejarla en 2.1 paa que no se topen, lo otro qaue en las demas simulaciones ocupo 3 entradas
    # para el subsetmultimpping por lo que pongo 2 cuando agrego los sensores, esto aca lo tengo con 2 entradas y todos lo freeobjects estan en freecenter,
    # por lo que ocupo solo 0 y 1 para los objetos libres


    return scene
